*
* restit_traj.dgibi
* a part of castax restit tools for recomputing particle trajectories
*
* This program is part of Castax.
*
* Copyright (C) 2002-2005 by Guillaume Pellerin <pellerin@ccr.jussieu.fr>
*
* This software is governed by the CeCILL license under French law and
* abiding by the rules of distribution of free software.  You can  use,
* modify and/ or redistribute the software under the terms of the CeCILL
* license as circulated by CEA, CNRS and INRIA at the following URL
* "http://www.cecill.info".
*
* As a counterpart to the access to the source code and  rights to copy,
* modify and redistribute granted by the license, users are provided only
* with a limited warranty  and the software's author,  the holder of the
* economic rights,  and the successive licensors  have only  limited
* liability.
*
* In this respect, the user's attention is drawn to the risks associated
* with loading,  using,  modifying and/or developing or reproducing the
* software by the user in light of its specific status of free software,
* that may mean  that it is complicated to manipulate,  and  that  also
* therefore means  that it is reserved for developers  and  experienced
* professionals having in-depth computer knowledge. Users are therefore
* encouraged to load and test the software's suitability as regards their
* requirements in conditions enabling the security of their systems and/or
* data to be ensured and,  more generally, to use and operate it in the
* same conditions as regards security.
*
* The fact that you are presently reading this means that you have had
* knowledge of the CeCILL license and that you accept its terms.
************************************************************
*
'OPTION' 'RESTITUER' 'data.sauv';
'RESTITUER';

'OPTION' 'DIME' 2 'ELEM' QUA8 'MODE' 'AXIS' ;
*
itcou = 0;
nitma = 'DIME' res.vitesses ;
npn = np.1;
*
* nombre de points de capture sur le rayon pour les trajectoires
rrtraj = 6;
* nombre de points de capture sur le rayon pour les trajectoires
rztraj = 10;

'MESSAGE' profil ':' freq 'Hz' umax 'm/s';

res . 'TRAJECTOIRES' = 'TABLE' ;
ris  = 'TABLE' ;
ris.itcou = res.VITESSES.itcou;

'REPETER' iitma ('-' nitma 1);

tra = TRAX ris rrtraj rtuydia rztraj npn pdt;
res . 'TRAJECTOIRES'.itcou = tra ;
itcou = itcou '+' 1;
ris.itcou = res.VITESSES.itcou;

'MESSAGE' 'Pas de temps:' &iitma '/' nitma;

'FIN' iitma ;

ficoutt =  'CHAINE' 'recomp/tr_' profil '_' (formar umax 2)
                            '_' (formar freq 2) '.ps';
XPORTPS res 'TRAJECTOIRES' TRAX ficoutt;


'FIN';
