*==================================================================
* Calcul de la fonction de courant d'un domaine fermé
*==================================================================
* E/  : UN       : CHPO     : Champ de vitesse
* E/  : $DOMAINE : MMODEL 'NAVIER_STOKES' volumique
* E/  : $CONTOUR : MMODEL 'NAVIER_STOKES' surfacique
*  /S : PSI      : CHPO     : Fonction de courant
*------------------------------------------------------------------
* On vérifie qu'on est en dimension 2 mais pas que div(UN)=0
* Si le domaine est ouvert, modifier les conditions aux limites
*------------------------------------------------------------------
* F. Dabbene (CEA)
*------------------------------------------------------------------
'DEBPROC' courant un*chpoint $domaine*mmodel $contour*mmodel ;
*
   VAL0 = 'VALE' 'DIME' ;
   TEST = 'EGA' VAL0 2 ;
   'SI' TEST ;
      'MESS' 'Remember that Velocity have to be at zero divergence' ;
   'SINON' ;
      'ERRE' 832 ;
      'QUIT' courant ;
   'FINSI' ;
   VAL1 = 'VALE' 'MODE' ;
   TEST = 'EGA' VAL1 'AXIS' ;
   'SI' TEST ;
      'MESSAGE' 'Mode axis pour la fonction de courant';
      ROTU0   = 'KOPS' un 'ROT' $domaine ;
      XC1 YC1 = 'COOR' ('DOMA' $domaine 'CENTRE') ;
      VZ1     = 'NOEL' $domaine ('EXCO' un 'UY' 'SCAL') ;
      ROTU0   = 2. * VZ1 '-' (ROTU0 * XC1) ;
   'SINO' ;
      ROTU0  = 'KOPS' un 'ROT' $domaine ;
      'MESSAGE' 'Mode plan';
   'FINSI' ;
   CONT0  = 'DOMA' $contour 'MAILLAGE' ;
   RK = 'EQEX' $domaine 'OPTI' 'EF' 'IMPL'
        'ZONE' $domaine 'OPER' 'LAPN' -1. 'INCO' 'PSI'
        'ZONE' $domaine 'OPER' 'FIMP' ROTU0 'INCO' 'PSI'
        'CLIM' 'PSI' 'TIMP' CONT0 0. ;
   RK . 'INCO' = 'TABLE' 'INCO' ;
   RK . 'INCO' . 'PSI' = 'KCHT' $domaine 'SCAL' 'SOMMET' 0. ;
   EXEC RK ;
   psi = 'COPI' RK . 'INCO' . 'PSI' ;
'FINP' psi ;
*
